*Heading
** Job name: Job-1 Model name: Model-1
** Generated by: Abaqus/CAE 2017
*Preprint, echo=NO, model=NO, history=NO, contact=NO
**
** PARTS
**
*Part, name=ASTME8-04
*Node
      1, 0.0366847776, 0.00047653669
      2, 0.0366414227, 0.000541421352
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*Element, type=CPS3
  1, 12552, 12274, 12479
  2,  4632, 12272,  3625
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*Element, type=CPS4R
  749,  3881,  1684,    16,    15
  750,  3881,    15,    14,  1429
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*Nset, nset=Set-1, generate
     1,  14156,      1
*Elset, elset=Set-1, generate
     1,  13723,      1
** Section: Section-1
*Solid Section, elset=Set-1, material=Al6061T6
,
*End Part
**
**
** ASSEMBLY
**
*Assembly, name=Assembly
**
*Instance, name=ASTME8-04-01, part=ASTME8-04
*End Instance
**
*Nset, nset=Edge-1, instance=ASTME8-04-01
 1505, 1593, 1594, 1595, 1596, 1597, 1598, 1599, 1600, 1601, 1602, 1603, 1604, 1605
*Elset, elset=Edge-1, instance=ASTME8-04-01
   96, 1727, 1728, 1780, 2415, 2431, 2448, 2456, 2471, 3330, 3332, 3360, 3361
*Nset, nset=Edge-2, instance=ASTME8-04-01
 1504, 1506, 1507, 1508, 1509, 1510, 1511, 1512, 1513, 1514, 1515, 1516, 1517
*Elset, elset=Edge-2, instance=ASTME8-04-01
  754, 2264, 2266, 2279, 2280, 3451, 3453, 3455, 3460, 3462, 3464, 3467
*End Assembly
**
** MATERIALS
**
*Material, name=Al6061T6
*Density
2700.,
*Elastic
 6.89e+10, 0.35
** ----------------------------------------------------------------
**
** STEP: Step-1
**
*Step, name=Step-1, nlgeom=NO
*Static
1., 1., 1e-05, 1.
**
** BOUNDARY CONDITIONS
**
** Name: BC1 Type: Symmetry/Antisymmetry/Encastre
*Boundary
Edge-1, ENCASTRE
** Name: BC2 Type: Displacement/Rotation
*Boundary
Edge-2, 1, 1, 0.0001
**
** OUTPUT REQUESTS
**
*Restart, write, frequency=0
**
** FIELD OUTPUT: F-Output-1
**
*Output, field, variable=PRESELECT
**
** HISTORY OUTPUT: H-Output-1
**
*Output, history, variable=PRESELECT
*End Step
